Clear
New Circuit.volt_control phases=3 bus1=source.1.2.3 basekV=0.4 pu=1.10 frequency=60
New Line.feeder phases=3 bus1=source.1.2.3 bus2=load.1.2.3 length=1 units=none R1=0.01 X1=0.02 R0=0.01 X0=0.02 C1=0 C0=0 NormAmps=300
Set VoltageBases=[0.4]
CalcVoltageBases
